** SpjutSim FEA independent reference: cantilever-bending
** Generated by tools/generate-calculix-reference.py; SI units.
*NODE
1, 0, 0, 0
2, 0.0625, 0, 0
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*ELEMENT, TYPE=C3D8, ELSET=EALL
1, 1, 2, 67, 66, 326, 327, 392, 391
2, 2, 3, 68, 67, 327, 328, 393, 392
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*NSET, NSET=NALL
1, 2, 3, 4, 5, 6
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*NSET, NSET=XMIN
1, 66, 131, 196, 261, 326
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*NSET, NSET=YMIN
1, 2, 3, 4, 5, 6
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*NSET, NSET=ZMIN
1, 2, 3, 4, 5, 6
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*NSET, NSET=XMAX
65, 130, 195, 260, 325, 390
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*ELSET, ELSET=PROBE
864
*SOLID SECTION, ELSET=EALL, MATERIAL=VALIDATION
*MATERIAL, NAME=VALIDATION
*ELASTIC
1.0E9, 0.25
*DENSITY
1000.
*BOUNDARY
XMIN, 1, 3, 0.
*STEP
*STATIC
*CLOAD
65, 3, -7.8125
130, 3, -15.625
195, 3, -15.625
260, 3, -15.625
325, 3, -7.8125
390, 3, -15.625
455, 3, -31.25
520, 3, -31.25
585, 3, -31.25
650, 3, -15.625
715, 3, -15.625
780, 3, -31.25
845, 3, -31.25
910, 3, -31.25
975, 3, -15.625
1040, 3, -15.625
1105, 3, -31.25
1170, 3, -31.25
1235, 3, -31.25
1300, 3, -15.625
1365, 3, -15.625
1430, 3, -31.25
1495, 3, -31.25
1560, 3, -31.25
1625, 3, -15.625
1690, 3, -15.625
1755, 3, -31.25
1820, 3, -31.25
1885, 3, -31.25
1950, 3, -15.625
2015, 3, -15.625
2080, 3, -31.25
2145, 3, -31.25
2210, 3, -31.25
2275, 3, -15.625
2340, 3, -15.625
2405, 3, -31.25
2470, 3, -31.25
2535, 3, -31.25
2600, 3, -15.625
2665, 3, -7.8125
2730, 3, -15.625
2795, 3, -15.625
2860, 3, -15.625
2925, 3, -7.8125
*NODE PRINT, NSET=XMAX
U
*NODE PRINT, NSET=XMIN, TOTALS=YES
RF
*EL PRINT, ELSET=PROBE
S
*END STEP
